# Bargraph2 Measurements
# Label and spine turned on
# Gauge | Height @ start | Height @ end
# A | 13 | 25
# B | 185 | 364
# C | 110 | 220
# D | 46 | 92
# E | 15 | 29
# F | 44 | 86
# Label and spine turned off
# Gauge | Height @ start | Height @ end
# A | 25 | 50
# B | 197 | 389
# C | 124 | 245
# D | 59 | 117
# E | 0 | 0
# F | 0 | 0
